Compile ($EXTERNAL_DSSFILES_FOLDER/European_LV_Test_Feeder-G/Master.dss)

Redirect $INTERNAL_DSSFILES_FOLDER/Common/NewSwitches.dss
Redirect $INTERNAL_DSSFILES_FOLDER/Common/NewMonitors.dss
Redirect $INTERNAL_DSSFILES_FOLDER/Common/NewLoadShapes.dss
Redirect $INTERNAL_DSSFILES_FOLDER/Common/NewPvs.dss
Redirect $INTERNAL_DSSFILES_FOLDER/Common/NewStorages.dss
Redirect $INTERNAL_DSSFILES_FOLDER/Common/NewVsources.dss

Set MaxControlIter=30 LoadMult=1.0 mode=daily stepsize=1m number=1440 loadshapeclass=daily time=(0,0)

Open line.sw1 terminal=1
Calcv
BusCoords $INTERNAL_DSSFILES_FOLDER/Common/BusCoords.dss

Solve
