Compile (../../data/inputs/DSSfiles/European_LV_Test_Feeder-G/Master.dss)

Set MaxControlIter=30

new Transformer.TSto1 phases=3 windings=2 buses=(StoBus 101) conns=(delta wye) kvs=(0.48 0.416) kvas=(1000 1000) taps='1 1' XHL=0.5
new Transformer.TPV1 phases=3 windings=2 buses=(PVBus 108) conns=(wye delta) kvs=(0.48 0.416) kvas=(1000 1000) taps='1 1' XHL=0.5

New "Storage.mystorage" phases=3 conn=delta bus1=StoBus kV=0.48 kva=800 kWrated=800 kWhrated=6000 %stored=100 %reserve=20
~ %EffCharge=90 %EffDischarge=90 %IdlingkW=1 %R=50 %X=50 State=DISCHARGING kP=0.3 KVDC=0.700 PITol=0.1

New "LoadShape.pvshape" npts=1440 minterval=1 mult=[ 0.00384025 0.00384025 0.00384025 0.00384025 0.00384025 0.00384025 0.00384025 0.00384025 0.00384025 0.00384025 0.00384025 0.00384025 0.00384025 0.00384025 0.00384025 0.00384025 0.00384025 0.00384025 0.00384025 0.00384025 0.00384025 0.00384025 0.00384025 0.00384025] action=normalize
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New "PVSystem.myPV" phases=3 conn=delta bus1=PVBus kV=0.48 kva=200 pmpp=200 daily=pvshape %R=50 %X=50 kP=0.1 KVDC=0.700 PITol=0.1

New InvControl.StoCtrl_Storage DERList=[Storage.mystorage] mode=GFM
New InvControl.StoCtrl_PV DERList=[PVSystem.myPV] mode=GFM

New "Monitor.pvmonitor" element=pvsystem.mypv mode=1 terminal=1 PPolar=no residual=no VIPolar=yes
New "Monitor.pvvi" element=pvsystem.mypv mode=0 terminal=1
New "Monitor.pvstatevars" element=pvsystem.mypv mode=3 terminal=1
New "Monitor.stomonitor" element=storage.mystorage mode=1 terminal=1 PPolar=no residual=no VIPolar=yes
New "Monitor.stovi" element=storage.mystorage mode=0 terminal=1
New "Monitor.stostatevars" element=storage.mystorage mode=3 terminal=1

New "Monitor.gridvoltages" element=line.LINE1 mode=0 terminal=1 VIPolar=yes

New "Monitor.lv_pv_bus" element=transformer.tpv1 mode=0 terminal=1 VIPolar=yes

Buscoords BusCoords.dat

Set LoadMult=1.0
set mode=daily
set stepsize=1m
set number=1440
set loadshapeclass=daily
set time=(0,0)

calcv
solve
